// COMSOL Multiphysics 6.3.0.290 model "NUMBER37_COMSOL63_angle_wavelength.mph"
// Outline of the model tree

Parameters
  R = 200[nm]
  H = 220[nm]
  tsub = 800[nm]
  tair = 800[nm]
  lambda0 = 1470[nm]
  f0 = c_const/lambda0
  Lx = 3.6[um]
  Ly = 3.6[um]
  E0 = 1[V/m]
  PortName = 1
  z0 = 0[nm]
  WID = 3820
  DIP = 3820
  HI = 1200
  theta_inc = 1[deg]  // Incidence angle from the port normal
  phi_inc = 0[deg]  // Azimuth in the original periodic port frame

Coordinate systems
  pml1: PML "完美匹配层 1" on domains 1, 4 | wavelengthSource = ewfd

Geometry
  geom1 "几何 1" (3D, length unit nm)
    blk5: Block "长方体 5" | size = {WID, WID, 800}; base = center; pos = {1470, 1470, HI+400}
    blk2: Block "长方体 2" | size = {WID, WID, HI}; base = center; pos = {1470, 1470, HI/2}
    blk1: Block "长方体 1" | size = {WID, WID, 800}; base = center; pos = {1470, 1470, -HI-400}
    blk6: Block "长方体 6" | size = {WID, WID, HI}; base = center; pos = {1470, 1470, -HI/2}
    qcyl1: Cylinder "圆柱体 1" | r = R; h = H; pos = {1476.055298[nm], 1469.494873[nm], z0}
    qcyl2: Cylinder "圆柱体 2" | r = R; h = H; pos = {1475.189638[nm], 2121.191478[nm], z0}
    qcyl3: Cylinder "圆柱体 3" | r = R; h = H; pos = {821.805668[nm], 1470.09001[nm], z0}
    qcyl4: Cylinder "圆柱体 4" | r = R; h = H; pos = {1475.368438[nm], 817.258394[nm], z0}
    qcyl5: Cylinder "圆柱体 5" | r = R; h = H; pos = {2130.276226[nm], 1470.387293[nm], z0}
    qcyl6: Cylinder "圆柱体 6" | r = R; h = H; pos = {1010.374389[nm], 1934.248213[nm], z0}
    qcyl7: Cylinder "圆柱体 7" | r = R; h = H; pos = {1939.812765[nm], 1933.771227[nm], z0}
    qcyl8: Cylinder "圆柱体 8" | r = R; h = H; pos = {1938.891459[nm], 1007.383113[nm], z0}
    qcyl9: Cylinder "圆柱体 9" | r = R; h = H; pos = {1011.427504[nm], 1006.361038[nm], z0}
    qcyl10: Cylinder "圆柱体 10" | r = R; h = H; pos = {1048.36258[nm], 2494.875484[nm], z0}
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    dif1: Difference "差集 1"
      input = blk2
      input2 = qcyl1, qcyl10, qcyl11, qcyl12, qcyl13, qcyl14, qcyl15, qcyl16, qcyl17, qcyl18, qcyl19, qcyl2, qcyl20, qcyl21, qcyl22, qcyl23, qcyl24, qcyl25, qcyl26, qcyl27, qcyl28, qcyl29, qcyl3, qcyl30, qcyl31, qcyl32, qcyl33, qcyl34, qcyl35, qcyl36, qcyl37, qcyl4, qcyl5, qcyl6, qcyl7, qcyl8, qcyl9
      keepsubtract = on
    fin: Finalize "形成联合体"

Materials
  mat1: Common "Silicon [solid,ideally pure]" on all domains
    def: def "基本"
      resistivity = res_solid_ideally_pure_1(T)
      thermalexpansioncoefficient = (alpha_solid_1(T)+(Tempref-293[K])*if(abs(T-Tempref)>1e-3,(alpha_solid_1(T)-alpha_solid_1(Tempref))/(T-Tempref),d(alpha_solid_1(T),T)))/(1+alpha_solid_1(Tempref)*(Tempref-293[K]))
      heatcapacity = C_solid_1(T)
      electricconductivity = sigma_solid_ideally_pure_1(T)
      HC = HC_solid_1(T)
      VP = VP_solid_1(T)
      density = rho_solid_1(T)
      res_solid_ideally_pure_1: Piecewise "分段 1"
        arg = T
        pieces = 
          {79.0, 364.0, exp(2.41553243E-14*T^6 - 4.53060537E-11*T^5 + 3.33138089E-08*T^4 - 1.25961454E-05*T^3 + 2.65814575E-03*T^2 - 3.13800137E-01*T + 1.66255491E+01)}
          {364.0, 584.0, exp(-7.48706678E-12*T^5 + 1.66560544E-08*T^4 - 1.49026159E-05*T^3 + 6.73181905E-03*T^2 - 1.54364035E+00*T + 1.42728132E+02)}
          {584.0, 909.0, exp(2.60884402E-10*T^4 - 7.15630353E-07*T^3 + 7.39495950E-04*T^2 - 3.57498909E-01*T + 6.64957193E+01)}
          {909.0, 1073.16, exp(-4.13090442E-03*T - 3.07044447E+00)}
        argunit = K
        fununit = ohm*m
      alpha_solid_1: Piecewise "分段 1a"
        arg = T
        pieces = 
          {0.0, 30.0, 7.35637E-7+2.453566E-9*T^1+1.20482E-11*T^2}
          {30.0, 130.0, 7.707972079E-7+2.098318E-10*T^1+4.628581E-11*T^2+7.569451E-14*T^3-8.713366E-16*T^4}
          {130.0, 293.0, -3.24590075E-7+2.257142E-8*T^1-9.684044E-11*T^2+2.835316E-13*T^3-3.440569E-16*T^4}
          {293.0, 1000.0, 6.794245226E-7+9.501405E-9*T^1-1.271286E-11*T^2+8.584038E-15*T^3-2.241706E-18*T^4}
        argunit = K
        fununit = 1/K
      C_solid_1: Piecewise "分段 1b"
        arg = T
        pieces = 
          {1.0, 7.0, -4.832181096E-5+7.68448084E-5*T^1-3.418133862E-5*T^2+2.808307076E-4*T^3-3.12897302E-7*T^4}
          {7.0, 20.0, 0.05251912742-0.03964814884*T^1+0.01004609362*T^2-7.812515424E-4*T^3+3.961556803E-5*T^4}
          {20.0, 50.0, -1.805175785+0.7619034712*T^1-0.08653737912*T^2+0.003735361395*T^3-3.333975631E-5*T^4}
          {50.0, 293.0, -82.940126+2.712235323*T^1+0.01404751222*T^2-7.977691376E-5*T^3+1.079905462E-7*T^4}
          {293.0, 900.0, 62.99772383+3.7706731*T^1-0.00694853616*T^2+5.9532044E-6*T^3-1.914384179E-9*T^4}
          {900.0, 1685.0, 769.4802262+0.1871751311*T^1-3.183959566E-5*T^2}
        argunit = K
        fununit = J/(kg*K)
      sigma_solid_ideally_pure_1: Piecewise "分段 1c"
        arg = T
        pieces = 
          {79.0, 364.0, 1/(exp(2.41553243E-14*T^6-4.53060537E-11*T^5+3.33138089E-08*T^4-1.25961454E-05*T^3+2.65814575E-03*T^2-3.13800137E-01*T+1.66255491E+01))}
          {364.0, 584.0, 1/(exp(-7.48706678E-12*T^5+1.66560544E-08*T^4-1.49026159E-05*T^3+6.73181905E-03*T^2-1.54364035E+00*T+1.42728132E+02))}
          {584.0, 909.0, 1/(exp(2.60884402E-10*T^4-7.15630353E-07*T^3+7.39495950E-04*T^2-3.57498909E-01*T+6.64957193E+01))}
          {909.0, 1073.16, 1/(exp(-4.13090442E-03*T-3.07044447E+00))}
        argunit = K
        fununit = S/m
      HC_solid_1: Piecewise "分段 1d"
        arg = T
        pieces = 
          {1.0, 7.0, -1.357142742E-6+2.158225189E-6*T^1-9.59999972E-7*T^2+7.887270952E-6*T^3-8.787876952E-9*T^4}
          {7.0, 20.0, 0.001475023955-0.001113538128*T^1+2.821495881E-4*T^2-2.19418374E-5*T^3+1.112623087E-6*T^4}
          {20.0, 50.0, -0.05069927193+0.0213984404*T^1-0.002430445434*T^2+1.049094905E-4*T^3-9.363637192E-7*T^4}
          {50.0, 293.0, -2.329414948+0.07617448976*T^1+3.945314097E-4*T^2-2.240575095E-6*T^3+3.032968211E-9*T^4}
          {293.0, 900.0, 1.391571826+0.1090406047*T^1-2.043950944E-4*T^2+1.786898954E-7*T^3-5.888574152E-11*T^4}
          {900.0, 1685.0, 21.99407257+0.004585166104*T^1-6.452267736E-7*T^2}
        argunit = K
        fununit = J/(mol*K)
      VP_solid_1: Piecewise "分段 1e" | arg = T; pieces = {293.0, 1687.0, exp(-28983.23815+18690.8144*log(T)^1-4934.14352*log(T)^2+662.645789*log(T)^3-45.0342817*log(T)^4+1.23403537*log(T)^5)}; argunit = K; fununit = Pa
      rho_solid_1: Piecewise "分段 1f"
        arg = T
        pieces = 
          {0.0, 30.0, 2331.510015-7.113612E-5*T^1+3.674386E-6*T^2}
          {30.0, 130.0, 2331.593513-0.005873649*T^1+1.206114E-4*T^2-5.479876E-7*T^3+1.606517E-10*T^4}
          {130.0, 293.0, 2330.438322+0.02130626*T^1-9.544145E-5*T^2+4.607415E-8*T^3+4.840886E-11*T^4}
          {293.0, 1000.0, 2332.565+0.003839515*T^1-5.433308E-5*T^2+4.287211E-8*T^3-1.366545E-11*T^4}
        argunit = K
        fununit = kg/m^3
    RefractiveIndex: RefractiveIndex "折射率"
      n = 3.4
      ki = 0
  mat2: Common "SiO2 (Silicon dioxide, Silica, Quartz) (Ghosh 1999: a-Quartz, n(o) 0.198-2.05 um)" on domains 1, 2
    DispersionModelSellmeierModified2: DispersionModelSellmeierModified2 "Sellmeier 修正，类型 2"
      ODsmc = {1.28604141, 1.07044083, 1.10202242, 1.00585997e-2, 100}
      Trefsmc = 22[degC]
      Prefsmc = 0
    RefractiveIndex: RefractiveIndex "折射率"
      ki = 0
  mat3: Common "Air (Mathar 2007: n 1.3-2.5 um)" on domains 3, 4
    RefractiveIndex: RefractiveIndex "折射率"
      n = nr(c_const/freq)
      ki = 0
      int1: Interpolation "插值 1"
        funcnametable = {int1, 1}
        funcname = nr
        table = 
          {1.30, 1.000273570659}
          {1.31, 1.000273556727}
          {1.32, 1.000273543114}
          {1.33, 1.000273529809}
          {1.34, 1.000273516805}
          {1.35, 1.000273504092}
          {1.36, 1.000273491661}
          {1.37, 1.000273479504}
          {1.38, 1.000273467614}
          {1.39, 1.000273455982}
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        fununit = 1
        argunit = um

Physics
  ewfd: ElectromagneticWavesFrequencyDomain "电磁波，频域" on all domains
    dependent variable E = {Ex, Ey, Ez}
    wee1: WaveEquationElectric "波动方程，电 1" (default) | DisplacementFieldModel = RefractiveIndex
    pec1: PerfectElectricConductor "理想电导体 1" (default)
    init1: init "初始值 1" (default)
    pc1: PeriodicCondition "周期性条件 1" on boundaries 2, 5, 8, 11, 14-17
      PeriodicType = Floquet
      Floquet_source = FromPeriodicPort
      destinationDomains: boundaries 14-17
    pc2: PeriodicCondition "周期性条件 2" on boundaries 1, 4, 7, 10, 240-243
      PeriodicType = Floquet
      Floquet_source = FromPeriodicPort
      destinationDomains: boundaries 240-243
    port1: Port "端口 1" on boundaries 12
      PortName = 1
      PortExcitation = on
      Pin = 1[W]
      PortSlit = 1
      SlitType = DomainBacked
      PortOrientation = ForwardPort
      Polarization = UserDefined
      InputType = E
      Eampl = {t1x, t1y, t1z}
      Hampl = {t1x, t1y, t1z}
      alpha1_inc = theta_inc
      alpha2_inc = phi_inc
      PortType = Periodic
    port2: Port "端口 2" on boundaries 6
      PortName = 2
      PortExcitation = off
      Pin = 1[W]
      PortSlit = 1
      SlitType = DomainBacked
      PortOrientation = ForwardPort
      Polarization = UserDefined
      InputType = E
      Eampl = {t1x, t1y, t1z}
      Hampl = {t1x, t1y, t1z}
      alpha1_inc = 0
      alpha2_inc = 0
      PortType = Periodic

Mesh
  mesh3 "网格 3"
    size: MeshSizeDefault "大小" | hmax = 299.90; hmin = 8.9980; hnarrow = 0.1; hgrad = 2; hauto = 9; custom = on
    size1: Size "大小 1" on domains 1, 2 | hmax = 196.30; hmin = 5.8890; hauto = 9; custom = on
    size2: Size "大小 2" on domains 5-41 | hmax = 88.240; hmin = 2.6470; hauto = 9; custom = on
    id1: IdenticalMesh "相同网格 1" | group1 = boundaries 2, 5, 8, 11; group2 = boundaries 14-17
    id2: IdenticalMesh "相同网格 2" | group1 = boundaries 1, 4, 7, 10; group2 = boundaries 240-243
    dis1: Distribution "分布 1" on edges 1, 10, 15, 21, 468, 474, 477, 480 | type = predefined; elemcount = 8
    ftet1: FreeTet "自由四面体网格 1" on domains 2, 3, 5-41 | optcurved = on
    map1: Map "映射 1" on boundaries 2, 11 | adjustedgdistr = on
    copy1: CopyFace "复制面 1" | source = boundaries 2, 11; destination = boundaries 14, 17
    map2: Map "映射 2" on boundaries 1, 10 | adjustedgdistr = on
    copy2: CopyFace "复制面 2" | source = boundaries 1, 10; destination = boundaries 240, 243
    swe1: Sweep "扫掠 1" on domains 1, 4
      dis1: Distribution "分布 1" on domains 1, 4 | numelem = 8

Studies
  std_angle "Angles 1-5 deg; wavelength 1000-1500 nm"
    param: Parametric "参数化扫描"
      sweeptype = filled
      pname = {theta_inc, lambda0}
      plistarr = {range(1,1,5), range(1000,5,1500)}
      punit = {deg, nm}
      keepsol = all
    freq: Frequency "频域" | punit = Hz; plist = c_const/lambda0

Solver configurations
  sol1 "解 1" (study std_angle)
    v1: Variables "因变量 1"
    s1: Stationary "稳态求解器 1"
      p1: Parametric "参数化 1"
      fc1: FullyCoupled "全耦合 1" | linsolver = i1
      i1: Iterative "建议的迭代求解器 (ewfd)" | itrestart = 300
        mg1: Multigrid "多重网格 1"

Datasets
  dset1: Solution | solution = sol1

Derived values
  gevrt: EvalGlobal "全局计算"
    data = dset1
    table = tblrt
    expr = {ewfd.Rport_1, ewfd.Rtotal, ewfd.Tport_2, ewfd.Ttotal, ewfd.RTtotal, ewfd.Atotal}