// COMSOL Multiphysics 6.4.0.293 model "NUMBER37 XIE.mph"
// Outline of the model tree
// Components: comp1 "组件 1", mcomp1 "网格组件 1", mcomp2 "网格组件 2", mcomp3 "网格组件 3", mcomp4 "网格组件 4"

Parameters
  R = 200[nm]
  H = 220[nm]
  tsub = 800[nm]
  tair = 800[nm]
  lambda0 = 1470[nm]  // 工作波长
  f0 = c_const/lambda0  // gzpl
  Lx = 3.6[um]  // 超胞尺寸
  Ly = 3.6[um]  // 超胞尺寸
  E0 = 1[V/m]
  PortName = 1
  z0 = 0[nm]
  WID = 3820
  DIP = 3820
  HI = 1200

Coordinate systems
  pml1: PML "完美匹配层 1" [geom1] on domains 1, 4

Geometry
  geom1 "几何 1" [comp1] (3D, length unit nm)
    blk5: Block "长方体 5" | size = {WID, WID, 800}; base = center; pos = {1470, 1470, HI+400}
    blk2: Block "长方体 2" | size = {WID, WID, HI}; base = center; pos = {1470, 1470, HI/2}
    blk1: Block "长方体 1" | size = {WID, WID, 800}; base = center; pos = {1470, 1470, -HI-400}
    blk6: Block "长方体 6" | size = {WID, WID, HI}; base = center; pos = {1470, 1470, -HI/2}
    qcyl1: Cylinder "圆柱体 1" | r = R; h = H; pos = {1476.055298[nm], 1469.494873[nm], z0}; axistype = cartesian
    qcyl2: Cylinder "圆柱体 2" | r = R; h = H; pos = {1475.189638[nm], 2121.191478[nm], z0}; axistype = cartesian
    qcyl3: Cylinder "圆柱体 3" | r = R; h = H; pos = {821.805668[nm], 1470.09001[nm], z0}; axistype = cartesian
    qcyl4: Cylinder "圆柱体 4" | r = R; h = H; pos = {1475.368438[nm], 817.258394[nm], z0}; axistype = cartesian
    qcyl5: Cylinder "圆柱体 5" | r = R; h = H; pos = {2130.276226[nm], 1470.387293[nm], z0}; axistype = cartesian
    qcyl6: Cylinder "圆柱体 6" | r = R; h = H; pos = {1010.374389[nm], 1934.248213[nm], z0}; axistype = cartesian
    qcyl7: Cylinder "圆柱体 7" | r = R; h = H; pos = {1939.812765[nm], 1933.771227[nm], z0}; axistype = cartesian
    qcyl8: Cylinder "圆柱体 8" | r = R; h = H; pos = {1938.891459[nm], 1007.383113[nm], z0}; axistype = cartesian
    qcyl9: Cylinder "圆柱体 9" | r = R; h = H; pos = {1011.427504[nm], 1006.361038[nm], z0}; axistype = cartesian
    qcyl10: Cylinder "圆柱体 10" | r = R; h = H; pos = {1048.36258[nm], 2494.875484[nm], z0}; axistype = cartesian
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    dif1: Difference "差集 1"
      input = blk2
      input2 = qcyl1, qcyl10, qcyl11, qcyl12, qcyl13, qcyl14, qcyl15, qcyl16, qcyl17, qcyl18, qcyl19, qcyl2, qcyl20, qcyl21, qcyl22, qcyl23, qcyl24, qcyl25, qcyl26, qcyl27, qcyl28, qcyl29, qcyl3, qcyl30, qcyl31, qcyl32, qcyl33, qcyl34, qcyl35, qcyl36, qcyl37, qcyl4, qcyl5, qcyl6, qcyl7, qcyl8, qcyl9
      keepsubtract = on
    fin: Finalize "形成联合体"
  mgeom1 "网格几何 1" [mcomp1] (3D, length unit nm)
  mgeom2 "网格几何 2" [mcomp2] (3D, length unit µm)
  mgeom3 "网格几何 3" [mcomp3] (3D, length unit µm)
  mgeom4 "网格几何 4" [mcomp4] (3D, length unit nm)

Materials
  mat1: Common "Silicon [solid,ideally pure]" [comp1] on all domains
    def: def "基本"
      resistivity = res_solid_ideally_pure_1(T)
      thermalexpansioncoefficient = (alpha_solid_1(T)+(Tempref-293[K])*if(abs(T-Tempref)>1e-3,(alpha_solid_1(T)-alpha_solid_1(Tempref))/(T-Tempref),d(alpha_solid_1(T),T)))/(1+alpha_solid_1(Tempref)*(Tempref-293[K]))
      heatcapacity = C_solid_1(T)
      electricconductivity = sigma_solid_ideally_pure_1(T)
      HC = HC_solid_1(T)
      VP = VP_solid_1(T)
      density = rho_solid_1(T)
      res_solid_ideally_pure_1: Piecewise
        arg = T
        pieces = 
          {79.0, 364.0, exp(2.41553243E-14*T^6 - 4.53060537E-11*T^5 + 3.33138089E-08*T^4 - 1.25961454E-05*T^3 + 2.65814575E-03*T^2 - 3.13800137E-01*T + 1.66255491E+01)}
          {364.0, 584.0, exp(-7.48706678E-12*T^5 + 1.66560544E-08*T^4 - 1.49026159E-05*T^3 + 6.73181905E-03*T^2 - 1.54364035E+00*T + 1.42728132E+02)}
          {584.0, 909.0, exp(2.60884402E-10*T^4 - 7.15630353E-07*T^3 + 7.39495950E-04*T^2 - 3.57498909E-01*T + 6.64957193E+01)}
          {909.0, 1073.16, exp(-4.13090442E-03*T - 3.07044447E+00)}
        argunit = K
        fununit = ohm*m
      alpha_solid_1: Piecewise
        arg = T
        pieces = 
          {0.0, 30.0, 7.35637E-7+2.453566E-9*T^1+1.20482E-11*T^2}
          {30.0, 130.0, 7.707972079E-7+2.098318E-10*T^1+4.628581E-11*T^2+7.569451E-14*T^3-8.713366E-16*T^4}
          {130.0, 293.0, -3.24590075E-7+2.257142E-8*T^1-9.684044E-11*T^2+2.835316E-13*T^3-3.440569E-16*T^4}
          {293.0, 1000.0, 6.794245226E-7+9.501405E-9*T^1-1.271286E-11*T^2+8.584038E-15*T^3-2.241706E-18*T^4}
        argunit = K
        fununit = 1/K
      C_solid_1: Piecewise
        arg = T
        pieces = 
          {1.0, 7.0, -4.832181096E-5+7.68448084E-5*T^1-3.418133862E-5*T^2+2.808307076E-4*T^3-3.12897302E-7*T^4}
          {7.0, 20.0, 0.05251912742-0.03964814884*T^1+0.01004609362*T^2-7.812515424E-4*T^3+3.961556803E-5*T^4}
          {20.0, 50.0, -1.805175785+0.7619034712*T^1-0.08653737912*T^2+0.003735361395*T^3-3.333975631E-5*T^4}
          {50.0, 293.0, -82.940126+2.712235323*T^1+0.01404751222*T^2-7.977691376E-5*T^3+1.079905462E-7*T^4}
          {293.0, 900.0, 62.99772383+3.7706731*T^1-0.00694853616*T^2+5.9532044E-6*T^3-1.914384179E-9*T^4}
          {900.0, 1685.0, 769.4802262+0.1871751311*T^1-3.183959566E-5*T^2}
        argunit = K
        fununit = J/(kg*K)
      sigma_solid_ideally_pure_1: Piecewise
        arg = T
        pieces = 
          {79.0, 364.0, 1/(exp(2.41553243E-14*T^6-4.53060537E-11*T^5+3.33138089E-08*T^4-1.25961454E-05*T^3+2.65814575E-03*T^2-3.13800137E-01*T+1.66255491E+01))}
          {364.0, 584.0, 1/(exp(-7.48706678E-12*T^5+1.66560544E-08*T^4-1.49026159E-05*T^3+6.73181905E-03*T^2-1.54364035E+00*T+1.42728132E+02))}
          {584.0, 909.0, 1/(exp(2.60884402E-10*T^4-7.15630353E-07*T^3+7.39495950E-04*T^2-3.57498909E-01*T+6.64957193E+01))}
          {909.0, 1073.16, 1/(exp(-4.13090442E-03*T-3.07044447E+00))}
        argunit = K
        fununit = S/m
      HC_solid_1: Piecewise
        arg = T
        pieces = 
          {1.0, 7.0, -1.357142742E-6+2.158225189E-6*T^1-9.59999972E-7*T^2+7.887270952E-6*T^3-8.787876952E-9*T^4}
          {7.0, 20.0, 0.001475023955-0.001113538128*T^1+2.821495881E-4*T^2-2.19418374E-5*T^3+1.112623087E-6*T^4}
          {20.0, 50.0, -0.05069927193+0.0213984404*T^1-0.002430445434*T^2+1.049094905E-4*T^3-9.363637192E-7*T^4}
          {50.0, 293.0, -2.329414948+0.07617448976*T^1+3.945314097E-4*T^2-2.240575095E-6*T^3+3.032968211E-9*T^4}
          {293.0, 900.0, 1.391571826+0.1090406047*T^1-2.043950944E-4*T^2+1.786898954E-7*T^3-5.888574152E-11*T^4}
          {900.0, 1685.0, 21.99407257+0.004585166104*T^1-6.452267736E-7*T^2}
        argunit = K
        fununit = J/(mol*K)
      VP_solid_1: Piecewise | arg = T; pieces = {293.0, 1687.0, exp(-28983.23815+18690.8144*log(T)^1-4934.14352*log(T)^2+662.645789*log(T)^3-45.0342817*log(T)^4+1.23403537*log(T)^5)}; argunit = K; fununit = Pa
      rho_solid_1: Piecewise
        arg = T
        pieces = 
          {0.0, 30.0, 2331.510015-7.113612E-5*T^1+3.674386E-6*T^2}
          {30.0, 130.0, 2331.593513-0.005873649*T^1+1.206114E-4*T^2-5.479876E-7*T^3+1.606517E-10*T^4}
          {130.0, 293.0, 2330.438322+0.02130626*T^1-9.544145E-5*T^2+4.607415E-8*T^3+4.840886E-11*T^4}
          {293.0, 1000.0, 2332.565+0.003839515*T^1-5.433308E-5*T^2+4.287211E-8*T^3-1.366545E-11*T^4}
        argunit = K
        fununit = kg/m^3
    ThermalExpansion: ThermalExpansion "热膨胀"
      alphatan = CTE_solid_1(T)
      dL = (dL_solid_1(T)-dL_solid_1(Tempref))/(1+dL_solid_1(Tempref))
      dL_solid_1: Piecewise
        arg = T
        pieces = 
          {0.0, 30.0, -2.157945075E-4}
          {30.0, 130.0, -2.275622662E-4+8.396104E-7*T^1-1.724143E-8*T^2+7.834799E-11*T^3-2.303956E-14*T^4}
          {130.0, 293.0, -5.217231294E-5-3.263667E-6*T^1+1.532991E-8*T^2-1.223001E-11*T^3}
          {293.0, 1000.0, -5.844526349E-4+1.124129E-6*T^1+3.311476E-9*T^2-1.161022E-12*T^3}
        argunit = K
      CTE_solid_1: Piecewise
        arg = T
        pieces = 
          {0.0, 35.0, -1.128708E-10+4.013852E-10*T^1-1.52474E-10*T^2+1.935922E-11*T^3-8.512984E-13*T^4+9.848876E-15*T^5}
          {35.0, 121.0, -4.540190868E-7+5.088778E-8*T^1-1.847617E-9*T^2+2.348401E-11*T^3-1.242463E-13*T^4+2.442997E-16*T^5}
          {121.0, 293.0, 8.511291633E-8-3.514147E-8*T^1+4.332654E-10*T^2-1.449023E-12*T^3+1.630929E-15*T^4}
          {293.0, 1000.0, -2.623074067E-6+3.020773E-8*T^1-5.538848E-11*T^2+4.755059E-14*T^3-1.534596E-17*T^4}
        argunit = K
        fununit = 1/K
    RefractiveIndex: RefractiveIndex "折射率"
      n = 3.4
      ki = 0
  mat2: Common "SiO2 (Silicon dioxide, Silica, Quartz) (Ghosh 1999: a-Quartz, n(o) 0.198-2.05 um)" [comp1] on domains 1, 2
    DispersionModelSellmeierModified2: DispersionModelSellmeierModified2 "Sellmeier 修正，类型 2"
      ODsmc = {1.28604141, 1.07044083, 1.10202242, 1.00585997e-2, 100}
      Trefsmc = 22[degC]
      Prefsmc = 0
    RefractiveIndex: RefractiveIndex "折射率"
      ki = 0
  mat3: Common "Air (Mathar 2007: n 1.3-2.5 um)" [comp1] on domains 3, 4
    RefractiveIndex: RefractiveIndex "折射率"
      n = nr(c_const/freq)
      ki = 0
      int1: Interpolation "插值 1"
        funcnametable = {int1, 1}
        funcname = nr
        table = 
          {1.30, 1.000273570659}
          {1.31, 1.000273556727}
          {1.32, 1.000273543114}
          {1.33, 1.000273529809}
          {1.34, 1.000273516805}
          {1.35, 1.000273504092}
          {1.36, 1.000273491661}
          {1.37, 1.000273479504}
          {1.38, 1.000273467614}
          {1.39, 1.000273455982}
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        fununit = 1
        argunit = um
        plotfuncname = nr

Physics
  ewfd: ElectromagneticWavesFrequencyDomain "电磁波，频域" [geom1] on all domains
    dependent variable E = {Ex, Ey, Ez}
    wee1: WaveEquationElectric "波动方程，电 1" (default)
    pec1: PerfectElectricConductor "理想电导体 1" (default)
    init1: init "初始值 1" (default)
    pc1: PeriodicCondition "周期性条件 1" on boundaries 2, 5, 8, 11, 14-17 | destinationDomains: boundaries 14-17
    pc2: PeriodicCondition "周期性条件 2" on boundaries 1, 4, 7, 10, 240-243 | destinationDomains: boundaries 240-243
    port1: Port "端口 1" on boundaries 12 | PortExcitation = on; PortSlit = 1; SlitType = DomainBacked; PortType = Periodic
    port2: Port "端口 2" on boundaries 6 | PortSlit = 1; PortType = Periodic

Mesh
  mpart1 "网格零件 1" [mgeom1]
    imp1: Import "导入 1" | source = stl; filename = D:\FDTD\523\64\Z.stl; createdom = on
    fin: Finalize "定型"
  mpart2 "网格零件 2" [mgeom2]
    imp1: Import "导入 1" | source = stl; filename = D:\FDTD\523\64\D.stl; createdom = on
    fin: Finalize "定型"
  mpart3 "网格零件 3" [mgeom3]
    imp1: Import "导入 1" | source = stl; filename = D:\FDTD\523\64\D.stl; createdom = on
    fin: Finalize "定型"
  mpart4 "网格零件 4" [mgeom4]
    imp1: Import "导入 1" | source = stl; filename = D:\FDTD\523\64\D.stl; createdom = on
    fin: Finalize "定型"
  mesh3 "网格 3" [geom1] (physics-controlled)
    size: MeshSizeDefault "大小" | hauto = 9

Studies
  std2 "研究 2"
    param: Parametric "参数化扫描" | pname = lambda0; plistarr = range(1000[nm],5[nm],1500[nm]); punit = nm
    freq: Frequency "频域" | punit = Hz; plist = c_const/lambda0; ftplistmethod = manual

Solver configurations
  sol1 "解 1" (study std2)
    v1: Variables "因变量 1"
    s1: Stationary "稳态求解器 1"
      p1: Parametric "参数化 1"
      fc1: FullyCoupled "全耦合 1"
      d1: Direct "建议的直接求解器 (ewfd)"
  sol2 "参数化解 1" (study std2)

Datasets
  dset1: Solution | solution = sol1
  dset2: Solution | solution = sol2

Derived values
  gev1: EvalGlobal "反射率、透射率和吸收率 (ewfd)"
    data = dset1
    table = tbl1
    expr = {ewfd.Rport_1, ewfd.Rtotal, ewfd.Tport_2, ewfd.Ttotal, ewfd.RTtotal, ewfd.Atotal}

Plots
  pg1: PlotGroup3D "电场 (ewfd)" | data = dset2
    mslc1: Multislice "多切面 1"
      expr = ewfd.normE
      xnumber = 0
      ynumber = 0
      ycoord = 1050
      multiplanezmethod = coord
      zcoord = 0
  pg3: PlotGroup1D "反射率、透射率和吸收率 (ewfd)" | data = dset1; ylabel = 反射率、透射率和吸收率 (1)
    glob1: Global "全局 1"
      data = dset2
      expr = {ewfd.Tport_2, ewfd.Rport_1, 1-ewfd.Tport_2-ewfd.Rport_1}
      unit = {1, 1, 1}
      descr = {透射率，端口 2, 反射率，端口 1, 吸收率}
      xdata = expr
      xdataexpr = lambda0

Methods
  method1: CodeEditor
    public class method1 extends ApplicationMethod {
      public void execute() {
        // =======================================================
        // Quasicrystal cylinder-number model
        // Nkeep = 1 / 9 / 17 / 25 / 33 / 37
        //
        // Fixed:
        //     cylinder coordinates
        //     R
        //     H
        //
        // Only change:
        //     number of cylinders retained from center outward
        // =======================================================
        // -------------------------------------------------------
        // 1. Parameters
        // -------------------------------------------------------
        model.param().set("R", "200[nm]");
        model.param().set("H", "220[nm]");
        model.param().set("z0", "0[nm]");
        // -------------------------------------------------------
        // 2. Choose number of cylinders
        // -------------------------------------------------------
        //
        // Recommended:
        // 1  = central cylinder
        // 9  = central + first shell
        // 17 = + second shell
        // 25 = + third shell
        // 33 = + fourth shell
        // 37 = full structure
        //
        int Nkeep = 37;
        // -------------------------------------------------------
        // 3. Original 37 cylinder centers
        // Unit: nm
        // -------------------------------------------------------
        double[] x = {
          2948.329102,
          1476.192993,
          0.345001,
          2093.324349,
          859.409728,
          1901.470817,
          430.385498,
          1048.362580,
          2518.341797,
          1475.189638,
          -16.258380,
          2965.768957,
          1939.812765,
          2501.436121,
          1010.374389,
          446.752993,
          2130.276226,
          821.805668,
          1476.055298,
          2949.273682,
          0.194580,
          2502.127675,
          1938.891459,
          1011.427504,
          447.214417,
          1475.368438,
          -14.848511,
          2963.239513,
          430.811172,
          2519.048828,
          1050.588058,
          1900.774773,
          0.000000,
          1475.512207,
          2093.390633,
          858.785996,
          2948.152100
        };
        double[] y = {
          2945.805176,
          2944.479248,
          2943.894531,
          2959.128457,
          2958.877445,
          2496.318320,
          2510.836670,
          2494.875484,
          2509.267090,
          2121.191478,
          2084.212552,
          2083.393854,
          1933.771227,
          1895.255560,
          1934.248213,
          1892.845187,
          1470.387293,
          1470.090010,
          1469.494873,
          1469.359863,
          1469.351440,
          1046.132499,
          1007.383113,
          1006.361038,
          1045.190805,
          817.258394,
          851.544607,
          850.232339,
          428.888664,
          428.656738,
          445.913728,
          445.852603,
          1.645844,
          1.502075,
          -16.640781,
          -16.917741,
          0.000000
        };
        // -------------------------------------------------------
        // 4. Cylinder order from center outward
        //
        // IMPORTANT:
        // Java index starts from 0.
        //
        // Structure:
        // cylinder 19 = center
        //
        // 1
        //  +8 -> 9
        //  +8 -> 17
        //  +8 -> 25
        //  +8 -> 33
        //  +4 -> 37
        // -------------------------------------------------------
        int[] order = {
          // ---------- N = 1 ----------
          18,
          // ---------- N = 9 ----------
          9,
          17,
          25,
          16,
          14,
          12,
          22,
          23,
          // ---------- N = 17 ----------
          7,
          30,
          31,
          5,
          13,
          15,
          21,
          24,
          // ---------- N = 25 ----------
          33,
          8,
          1,
          6,
          19,
          20,
          28,
          29,
          // ---------- N = 33 ----------
          4,
          35,
          34,
          3,
          11,
          10,
          27,
          26,
          // ---------- N = 37 ----------
          32,
          36,
          2,
          0
        };
        // -------------------------------------------------------
        // 5. Delete previously generated qcyl cylinders
        // -------------------------------------------------------
        for (int i = 1; i <= 37; i++) {
          String oldtag = "qcyl"+i;
          try {
            model.component("comp1")
              .geom("geom1")
              .feature()
              .remove(oldtag);
          }
          catch (Exception e) {
            // Feature does not exist -> ignore
          }
        }
        // -------------------------------------------------------
        // 6. Generate selected cylinders
        // -------------------------------------------------------
        for (int i = 0; i < Nkeep; i++) {
          int id = order[i];
          String tag = "qcyl"+(i+1);
          model.component("comp1")
            .geom("geom1")
            .create(tag, "Cylinder");
          // Radius
          model.component("comp1")
            .geom("geom1")
            .feature(tag)
            .set("r", "R");
          // Height
          model.component("comp1")
            .geom("geom1")
            .feature(tag)
            .set("h", "H");
          // Position
          String xpos = Double.toString(x[id])+"[nm]";
          String ypos = Double.toString(y[id])+"[nm]";
          model.component("comp1")
            .geom("geom1")
            .feature(tag)
            .set(
                 "pos",
                 new String[]{
                   xpos,
                   ypos,
                   "z0"
                 }
                 );
          // Cylinder along z
          model.component("comp1")
            .geom("geom1")
            .feature(tag)
            .set(
                 "axis",
                 new double[]{0, 0, 1}
                 );
        }
        // -------------------------------------------------------
        // 7. Rebuild geometry
        // -------------------------------------------------------
        model.component("comp1")
          .geom("geom1")
          .run();
        // -------------------------------------------------------
        // Finished
        // -------------------------------------------------------
        System.out.println(
                           "Quasicrystal model generated. N = "
                           +Nkeep
                           );
      }
    }